<neuroml xmlns="http://www.neuroml.org/schema/neuroml2"  xmlns:xs="http://www.w3.org/2001/XMLSchema" xmlns:xsi="http://www.w3.org/2001/XMLSchema-instance" xsi:schemaLocation="http://www.neuroml.org/schema/neuroml2 https://raw.github.com/NeuroML/NeuroML2/development/Schemas/NeuroML2/NeuroML_v2.1.xsd" id="MaexDeSchutter1998">
    <notes>Generated by NeuroMLlite v0.2.1
    Generated network: MaexDeSchutter1998
    Generation seed: 1234
    NeuroMLlite parameters:
        mf_rate = 50
        num_Gol = 4
        num_GrC = 75
        num_MF = 12
        weight_gol_grc = 45
        weight_grc_gol = 0.6
        weight_mf_grc_ampa = 6
        weight_mf_grc_nmda = 4</notes>
    <include href="Granule_98.cell.nml"/>
    <include href="Golgi_98.cell.nml"/>
    <expTwoSynapse id="MF_AMPA" gbase="1.1238527e-10S" erev="0V" tauDecay="5e-4s" tauRise="3e-5s">
        <notes>Mossy fiber to Granule Cell AMPA synapse</notes>
    </expTwoSynapse>
    <expTwoSynapse id="AMPA_GranGol" gbase="1.137355e-9S" erev="0V" tauDecay="0.5e-3s" tauRise="3e-5s">
        <notes>AMPA synaptic mechanism from Granule cells to Golgi cells</notes>
    </expTwoSynapse>
    <expTwoSynapse id="GABAA" gbase="3.14159E-10S" erev="-0.07V" tauDecay="0.0088333s" tauRise="3.1E-4s">
        <notes>GABA A synaptic mechamism from Golgis to Granule cells</notes>
    </expTwoSynapse>
    <blockingPlasticSynapse id="NMDA" gbase="1.873087796e-10S" erev="0V" tauDecay="13.3333e-3s" tauRise="1e-3s">
        <notes>Example of an NMDA receptor synaptic mechanism, based on Maex DeSchutter 1998, Gabbiani et al, 1994</notes>
        <blockMechanism type="voltageConcDepBlockMechanism" species="mg" blockConcentration="1.2mM" scalingConc="1.9205441817997078mM" scalingVolt="0.016129032258064516V"/>
    </blockingPlasticSynapse>
    <SpikeSourcePoisson id="poisson_input" start="0.0ms" duration="1000000000.0ms" rate="50.0Hz"/>
    <network id="MaexDeSchutter1998" type="networkWithTemperature" temperature="32.0degC">
        <notes>Example 7: MaexDeSchutter1998</notes>
        <property tag="recommended_dt_ms" value="0.015"/>
        <property tag="recommended_duration_ms" value="600.0"/>
        <population id="GrCs" component="Granule_98" size="75" type="populationList">
            <property tag="region" value="GranuleCellLayer"/>
            <instance id="0">
                <location x="966.453535692138757" y="44.073259917535268" z="7.491470058587191"/>
            </instance>
            <instance id="1">
                <location x="910.975962449124154" y="93.926899736376399" z="582.227573058949133"/>
            </instance>
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        </population>
        <population id="Gols" component="Golgi_98" size="4" type="populationList">
            <property tag="region" value="GranuleCellLayer"/>
            <instance id="0">
                <location x="515.652502741126796" y="43.455539575769052" z="515.284232106304557"/>
            </instance>
            <instance id="1">
                <location x="68.996845514069705" y="75.95807906796766" z="305.161522786505088"/>
            </instance>
            <instance id="2">
                <location x="698.080446463596218" y="90.950269684057133" z="219.599093107485487"/>
            </instance>
            <instance id="3">
                <location x="504.376277944985645" y="65.314180337255536" z="810.958325998167652"/>
            </instance>
        </population>
        <population id="MFs" component="poisson_input" size="12" type="populationList">
            <property tag="radius" value="3"/>
            <property tag="region" value="GranuleCellLayer"/>
            <instance id="0">
                <location x="682.751421518992515" y="33.109137313484148" z="564.179831963822949"/>
            </instance>
            <instance id="1">
                <location x="162.534292623261678" y="49.94160285960556" z="940.048073796692506"/>
            </instance>
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        </population>
        <projection id="proj_mf_grc_ampa" presynapticPopulation="MFs" postsynapticPopulation="GrCs" synapse="MF_AMPA">
            <connectionWD id="0" preCellId="../MFs/0/poisson_input" postCellId="../GrCs/2/Granule_98" weight="6." delay="0ms"/>
            <connectionWD id="1" preCellId="../MFs/0/poisson_input" postCellId="../GrCs/4/Granule_98" weight="6." delay="0ms"/>
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        </projection>
        <projection id="proj_mf_grc_nmda" presynapticPopulation="MFs" postsynapticPopulation="GrCs" synapse="NMDA">
            <connectionWD id="0" preCellId="../MFs/0/poisson_input" postCellId="../GrCs/3/Granule_98" weight="4." delay="0ms"/>
            <connectionWD id="1" preCellId="../MFs/0/poisson_input" postCellId="../GrCs/4/Granule_98" weight="4." delay="0ms"/>
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        </projection>
        <projection id="proj_grc_gol_ampa" presynapticPopulation="GrCs" postsynapticPopulation="Gols" synapse="AMPA_GranGol">
            <connectionWD id="0" preCellId="../GrCs/0/Granule_98" postCellId="../Gols/1/Golgi_98" weight="0.6" delay="0ms"/>
            <connectionWD id="1" preCellId="../GrCs/0/Granule_98" postCellId="../Gols/2/Golgi_98" weight="0.6" delay="0ms"/>
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        </projection>
        <projection id="proj_gol_grc_ampa" presynapticPopulation="Gols" postsynapticPopulation="GrCs" synapse="GABAA">
            <connectionWD id="0" preCellId="../Gols/0/Golgi_98" postCellId="../GrCs/3/Granule_98" weight="45." delay="0ms"/>
            <connectionWD id="1" preCellId="../Gols/0/Golgi_98" postCellId="../GrCs/5/Granule_98" weight="45." delay="0ms"/>
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        </projection>
    </network>
</neuroml>
