<?xml version="1.0" encoding="UTF-8"?>
<neuroml xmlns="http://www.neuroml.org/schema/neuroml2" xmlns:xsi="http://www.w3.org/2001/XMLSchema-instance" xsi:schemaLocation="http://www.neuroml.org/schema/neuroml2  https://raw.github.com/NeuroML/NeuroML2/development/Schemas/NeuroML2/NeuroML_v2beta1.xsd" id="network_GranCellLayer">

<notes>

Network structure (NeuroML 2beta) for project: GranCellLayer saved with neuroConstruct v1.7.0 on: 17:56:27, 28-Aug-13

Cell Group: GoC_3D contains 32 cells
Cell Group: MF_3D contains 96 cells
Cell Group: GrC_3D contains 600 cells

Network connection: NetConnMFGrC contains 2486 individual synaptic connections
Network connection: NetConnGoCGrC contains 600 individual synaptic connections
Network connection: NetConnGrCGoC contains 2400 individual synaptic connections

</notes>

    <spikeGeneratorPoisson id="Input_4" averageRate="50.0 per_ms"/>

    <network id="network_GranCellLayer" type="networkWithTemperature" temperature="32.0 degC">

        <population id="GoC_3D" component="Golgi_98_3D" type="populationList">
            <instance id="0">
                <location x="-8.688187" y="34.636337" z="310.85602"/>
            </instance>
            <instance id="1">
                <location x="223.95532" y="19.562471" z="-248.23117"/>
            </instance>
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        </population>

        <population id="MF_3D" component="MossyFiber" type="populationList">
            <instance id="0">
                <location x="85.835236" y="18.695187" z="388.08063"/>
            </instance>
            <instance id="1">
                <location x="203.66278" y="30.436775" z="-139.47415"/>
            </instance>
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        </population>

        <population id="GrC_3D" component="Granule_98_3D" type="populationList">
            <instance id="0">
                <location x="-91.00136" y="33.087315" z="-379.54218"/>
            </instance>
            <instance id="1">
                <location x="-55.434433" y="40.09487" z="433.17737"/>
            </instance>
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        </population>

        <population id="Input_4_population" component="Input_4_population" size="96"/>    <projection id="NetConnMFGrC" presynapticPopulation="MF_3D" postsynapticPopulation="GrC_3D" synapse="MF_AMPA">
            <connection id="0" preCellId="../MF_3D/45/MossyFiber" postCellId="../GrC_3D/0/Granule_98_3D" preSegmentId="0" preFractionAlong="0.0" postSegmentId="0" postFractionAlong="0.5"/>
            <connection id="1" preCellId="../MF_3D/49/MossyFiber" postCellId="../GrC_3D/0/Granule_98_3D" preSegmentId="0" preFractionAlong="0.0" postSegmentId="0" postFractionAlong="0.5"/>
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        </projection>

        <projection id="NetConnGoCGrC" presynapticPopulation="GoC_3D" postsynapticPopulation="GrC_3D" synapse="GABAA">
            <connection id="0" preCellId="../GoC_3D/9/Golgi_98_3D" postCellId="../GrC_3D/0/Granule_98_3D" preSegmentId="0" preFractionAlong="0.5" postSegmentId="0" postFractionAlong="0.5"/>
            <connection id="1" preCellId="../GoC_3D/21/Golgi_98_3D" postCellId="../GrC_3D/1/Granule_98_3D" preSegmentId="0" preFractionAlong="0.5" postSegmentId="0" postFractionAlong="0.5"/>
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        </projection>

        <projection id="Input_4_projection">
    <connection id="0"/>

    <connection id="1"/>

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    </projection>    <projection id="NetConnGrCGoC" presynapticPopulation="GrC_3D" postsynapticPopulation="GoC_3D" synapse="AMPA_GranGol">
            <connection id="0" preCellId="../GrC_3D/0/Granule_98_3D" postCellId="../GoC_3D/5/Golgi_98_3D" preSegmentId="2" preFractionAlong="0.13676476" postSegmentId="3" postFractionAlong="0.11538565"/>
            <connection id="1" preCellId="../GrC_3D/0/Granule_98_3D" postCellId="../GoC_3D/2/Golgi_98_3D" preSegmentId="3" preFractionAlong="0.11835434" postSegmentId="3" postFractionAlong="0.43414503"/>
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        </projection>

    </network>

</neuroml>
